// SBML level 3 version 2

function preprocess(c)
  1*log10(1 + c/1);
end

function heaviside(x)
  piecewise(1, x > 0, 0);
end

model dictyostelium_qs()
  // model units - time: second, area: area

  // Compartments:
  compartment extracellular = 1;  // 2-D

  // Species:
  species cAMP in extracellular = 0;

  // Parameters:
  activator = 0;
  repressor = 0;
  fhn_epsilon = 0;
  fhn_gamma = 0;
  fhn_c = 0;
  cAMP_inflow = 0;
  degrate_rate = 0;
  leakage_rate = 0;
  spike_amount = 0;

  // Rate rules:
  activator' = activator + (-0.333333*activator^3) + (-1*repressor) + preprocessor(cAMP) + stoich();
  repressor' = fhn_epsilon*(activator> + (-1*fhn_gamma*repressor) + fhn_c);
  cAMP' = cAMP_inflow + leakage_rate + spike_amount*heaviside(activator) + (-1*degrate_rate*cAMP);
end
